# -*- coding: utf-8 -*-
"""
    Cosserat class in SofaPython3.
"""

__authors__ = "younesssss"
__contact__ = "adagolodjo@protonmail.com"
__version__ = "1.0.0"
__copyright__ = "(c) 2021,Inria"
__date__ = "Jan, 17 2022"

import Sofa
from cosserat.cosseratObject import Cosserat
from cosserat.nonLinearCosserat import NonLinearCosserat as nonCosserat
from cosserat.usefulFunctions import buildEdges, pluginList, BuildCosseratGeometry
from math import sqrt


initialStrain4 = [[0., 0., 0], [0., 0., 0], [0., 0., 0]]

nonLinearConfig = {'init_pos': [0., 0., 0.], 'tot_length': 1, 'nbSectionS': 5,
                   'nbFramesF': 15, 'buildCollisionModel': 0, 'beamMass': 22}


def createScene(rootNode):
    rootNode.addObject('RequiredPlugin', name='plugins', pluginName=[pluginList,
                                                                     ['SofaEngine', 'SofaLoader', 'SofaSimpleFem',
                                                                      'SofaExporter']])
    rootNode.addObject('VisualStyle', displayFlags='showVisualModels showBehaviorModels hideCollisionModels '
                                                   'hideBoundingCollisionModels hireForceFields '
                                                   'hideInteractionForceFields hideWireframe')
    rootNode.findData('dt').value = 0.02
    # rootNode.findData('gravity').value = [0., -9.81, 0.]
    rootNode.findData('gravity').value = [0., 0., 0.]
    rootNode.addObject('BackgroundSetting', color='0 0.168627 0.211765')
    # rootNode.addObject('FreeMotionAnimationLoop')
    # rootNode.addObject('GenericConstraintSolver', tolerance=1e-5, maxIterations=5e2)
    rootNode.addObject('Camera', position="-35 0 280", lookAt="0 0 0")

    solverNode = rootNode.addChild('solverNode')
    solverNode.addObject('EulerImplicitSolver', rayleighStiffness="0.1", rayleighMass='0.')
    solverNode.addObject('SparseLDLSolver', name='solver', template="CompressedRowSparseMatrixd")
    # solverNode.addObject('SparseLUSolver', name='solver', template="CompressedRowSparseMatrixd")
    # solverNode.addObject('CGLinearSolver', tolerance=1.e-12, iterations=1000, threshold=1.e-18)

    needCollisionModel = 0  # use this if the collision model if the beam will interact with another object
    nonLinearCosserat = solverNode.addChild(
        nonCosserat(parent=solverNode, cosseratGeometry=nonLinearConfig, useCollisionModel=needCollisionModel,
                    name="cosserat", radius=0.005, youngModulus=1.e8, legendreControlPoints=initialStrain4,
                    order=3))
    cosseratNode = nonLinearCosserat.legendreControlPointsNode
    cosseratNode.addObject('MechanicalMatrixMapper', template='Vec3,Vec3',
                           object1=cosseratNode.getLinkPath(),
                           object2=cosseratNode.getLinkPath(),
                           name='cosseratCoordinateNodeMapper',
                           nodeToParse=nonLinearCosserat.cosseratCoordinateNode.getLinkPath())

    beamFrame = nonLinearCosserat.cosseratFrame

    print(f'=======> math :{1./sqrt(2)}')
    beamFrame.addObject('ConstantForceField', name='constForce', showArrowSize=1.e-8,
                        indices=nonLinearConfig['nbFramesF'], force=[0., 0., 0., 0., 1./sqrt(2), 1./sqrt(2)])

    # # solverNode2 = rootNode.addChild('solverNode2')
    # # solverNode2.addObject('EulerImplicitSolver', rayleighStiffness="0.2", rayleighMass='0.1')
    # # solverNode2.addObject('SparseLDLSolver', name='solver', template="CompressedRowSparseMatrixd")
    # # solverNode2.addObject('GenericConstraintCorrection')
    # # cosserat2 = solverNode2.addChild(Cosserat(parent=solverNode2, cosseratGeometry=linearConfig,
    # #                                           useCollisionModel=needCollisionModel, name="cosserat2", radius=0.1))
    #
    # beamFrame2 = cosserat2.cosseratFrame
    # beamFrame2.addObject('ConstantForceField', name='constForce', showArrowSize=0, indices=12,
    #                      force=[0., 0., 0., 0., 450., 0.])

    return rootNode
